OpenVSP model (file version 5), 5 components.
Geometry view with OpenVSP parameter names; values to 6 digits, angles in degrees, lengths in the model's unit.
Overall bounding box: X_Min=0 X_Len=9.18602 Y_Min=-5.76651 Y_Len=11.533 Z_Min=-0.29514 Z_Len=2.38924

Wing "main_wing"
  location (X Y Z) 2.85 0 1.077, rotation 0 0 0
  symmetric about XZ
  bounding box size 1.4506 11.533 0.270765
  totals: TotalSpan=11.4017 TotalProjectedSpan=11.4 TotalChord=1.31261 TotalArea=15.06 TotalAR=8.62945
  root: chord 1.45, twist 0, airfoil file "NACA 642415"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 BaseThickChord=0.150121 ThickChord=0.15
  sections:
    n  Span     Root_Chord  Tip_Chord  Area     Sweep  Sweep_Location  Dihedral  Twist  Twist_Location  tip airfoil
    1  3.02146  1.45        1.45       4.38112  0      0.25            1         0      0.25            as above
    2  2.67941  1.45        0.90045    3.14891  0      0.25            1         0      0.25            as above
  SS_Control "Main_wing_flap": UStart=0.2927 UEnd=0.5 Length_C_Start=0.1666 Length_C_End=0.1666 Length_Start=0.24157 Length_End=0.24157 LE_Flag=0 Surf_Type=2

Wing "horizontal_stabilizer"
  location (X Y Z) 7.789 0 0.3314, rotation 0 0 0
  symmetric about XZ
  bounding box size 0.787 3.39448 0.0944827
  totals: TotalSpan=3.3 TotalProjectedSpan=3.3 TotalChord=0.787 TotalArea=2.5971 TotalAR=4.19314
  root: chord 0.787, twist 0, NACA 4-series Camber=0 CamberLoc=0.2 ThickChord=0.12
  sections:
    n  Span  Root_Chord  Tip_Chord  Area     Sweep  Sweep_Location  Dihedral  Twist  Twist_Location  tip airfoil
    1  1.65  0.787       0.787      1.29855  0      0.25            0         0      0.25            as above

Wing "vertical_stabilizer"
  location (X Y Z) 7.25 0 0.497, rotation 90 0 0
  bounding box size 1.93602 0.144065 1.5971
  totals: TotalSpan=1.574 TotalProjectedSpan=1.574 TotalChord=0.8485 TotalArea=1.33554 TotalAR=1.85504
  root: chord 1.2, twist 0, NACA 4-series Camber=0 CamberLoc=0.2 ThickChord=0.12
  sections:
    n  Span   Root_Chord  Tip_Chord  Area     Sweep  Sweep_Location  Dihedral  Twist  Twist_Location  tip airfoil
    1  1.574  1.2         0.497      1.33554  38.75  0.25            0         0      0.25            as above

Fuselage "fuselage"
  location (X Y Z) 0 0 0, rotation 0 0 0
  bounding box size 8.45 1.26677 1.45218
  Design: Length=8.45
  cross sections:
    n  XLocPercent  YLocPercent  ZLocPercent  shape
    0  0            0            0            point
    1  0.183361     0            0.03         ellipse Ellipse_Height=1.077 Ellipse_Width=1.22
    2  0.380178     0            0.051        ellipse Ellipse_Height=1.45218 Ellipse_Width=1.22
    3  0.855621     0            0.045        ellipse Ellipse_Height=0.5 Ellipse_Width=0.51
    4  1            0            0.05147      point

Custom "propeller"
  location (X Y Z) 2.494 1.6 1.077, rotation 0 0 0
  symmetric about XZ
  bounding box size 0 4.98 1.78
  Design: Diameter=1.78
  custom script Disk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
