OpenVSP model (file version 5), 12 components.
Geometry view with OpenVSP parameter names; values to 6 digits, angles in degrees, lengths in the model's unit.
Overall bounding box: X_Min=0 X_Len=30 Y_Min=-5 Y_Len=10 Z_Min=-5 Z_Len=10

Wing "main_wing"
  location (X Y Z) 2.85 0 1.077, rotation 0 0 0
  symmetric about XZ
  bounding box size 0.755589 9.71794 0.118147
  totals: TotalSpan=9.639 TotalProjectedSpan=9.639 TotalChord=0.6426 TotalArea=6.19402 TotalAR=15
  root: chord 0.756, twist 2, airfoil file "NASA X-57"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 BaseThickChord=0.149669 ThickChord=0.14967
  sections:
    n  Span    Root_Chord  Tip_Chord  Area     Sweep  Sweep_Location  Dihedral  Twist  Twist_Location  tip airfoil
    1  4.8195  0.756       0.5292     3.09701  1.226  0.25            0         0      0.7             as above

Wing "horizontal_stabilizer"
  location (X Y Z) 7.789 0 0.3314, rotation 0 0 0
  symmetric about XZ
  bounding box size 0.787 3.39448 0.0944827
  totals: TotalSpan=3.3 TotalProjectedSpan=3.3 TotalChord=0.787 TotalArea=2.5971 TotalAR=4.19314
  root: chord 0.787, twist 0, NACA 4-series Camber=0 CamberLoc=0.2 ThickChord=0.12
  sections:
    n  Span  Root_Chord  Tip_Chord  Area     Sweep  Sweep_Location  Dihedral  Twist  Twist_Location  tip airfoil
    1  1.65  0.787       0.787      1.29855  0      0.25            0         0      0.25            as above

Wing "vertical_stabilizer"
  location (X Y Z) 7.25 0 0.497, rotation 90 0 0
  bounding box size 1.93602 0.144065 1.5971
  totals: TotalSpan=1.574 TotalProjectedSpan=1.574 TotalChord=0.8485 TotalArea=1.33554 TotalAR=1.85504
  root: chord 1.2, twist 0, NACA 4-series Camber=0 CamberLoc=0.2 ThickChord=0.12
  sections:
    n  Span   Root_Chord  Tip_Chord  Area     Sweep  Sweep_Location  Dihedral  Twist  Twist_Location  tip airfoil
    1  1.574  1.2         0.497      1.33554  38.75  0.25            0         0      0.25            as above

Fuselage "fuselage"
  location (X Y Z) 0 0 0, rotation 0 0 0
  bounding box size 8.45 1.26201 1.45218
  Design: Length=8.45
  cross sections:
    n  XLocPercent  YLocPercent  ZLocPercent  shape
    0  0            0            0            point
    1  0.183361     0            0.03         ellipse Ellipse_Height=1.077 Ellipse_Width=1.22
    2  0.359645     0            0.051        ellipse Ellipse_Height=1.45218 Ellipse_Width=1.22
    3  0.855621     0            0.045        ellipse Ellipse_Height=0.5 Ellipse_Width=0.51
    4  1            0            0.05147      point

Disk "cruise_propeller"
  location (X Y Z) 2.67859 4.8195 1.1166, rotation 0 0 0
  symmetric about XZ
  bounding box size 0 11.163 1.524
  Design: Diameter=1.524
  custom script Disk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

Disk "high_lift_propeller_1"
  location (X Y Z) 2.65755 0.78 0.97032, rotation 0 0 0
  symmetric about XZ
  bounding box size 0 2.139 0.579
  Design: Diameter=0.579
  custom script Disk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

Disk "high_lift_propeller_2"
  location (X Y Z) 2.70814 1.27465 0.97032, rotation 0 0 0
  symmetric about XZ
  bounding box size 0 3.1283 0.579
  Design: Diameter=0.579
  custom script Disk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

Disk "high_lift_propeller_3"
  location (X Y Z) 2.65812 1.7693 0.97032, rotation 0 0 0
  symmetric about XZ
  bounding box size 0 4.11759 0.579
  Design: Diameter=0.579
  custom script Disk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

Disk "high_lift_propeller_4"
  location (X Y Z) 2.70871 2.26395 0.97032, rotation 0 0 0
  symmetric about XZ
  bounding box size 0 5.10689 0.579
  Design: Diameter=0.579
  custom script Disk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

Disk "high_lift_propeller_5"
  location (X Y Z) 2.6587 2.75859 0.97032, rotation 0 0 0
  symmetric about XZ
  bounding box size 0 6.09619 0.579
  Design: Diameter=0.579
  custom script Disk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

Disk "high_lift_propeller_6"
  location (X Y Z) 2.70928 3.25324 0.97032, rotation 0 0 0
  symmetric about XZ
  bounding box size 0 7.08549 0.579
  Design: Diameter=0.579
  custom script Disk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

Disk "high_lift_propeller_7"
  location (X Y Z) 2.65927 3.74789 0.97032, rotation 0 0 0
  symmetric about XZ
  bounding box size 0 8.07478 0.579
  Design: Diameter=0.579
  custom script Disk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
